variable        T   equal  125
variable        dt  equal  0.2
variable        P   equal  20.0
variable        nsteps  equal 100000
variable        thermo_freq equal 1
variable        dump_freq equal 1

processors      * * * map xyz

units           real
atom_style      full
boundary        p p p
read_data       initial.data
#read_restart    restart.old

pair_style      mbx 9.0
pair_modify     mix arithmetic

bond_style      none
angle_style     none
dihedral_style  none
improper_style  none

pair_coeff      * * 0.0 0.0

neighbor        2.0 bin
neigh_modify    every 1 delay 1 check no

timestep        ${dt}

compute         mbx all pair mbx
variable        e1bpip    equal c_mbx[1]
variable        e2bpip    equal c_mbx[2]
variable        e3bpip    equal c_mbx[3]
variable        e4bpip    equal c_mbx[4]
variable        edisp     equal c_mbx[5]
variable        ebuck     equal c_mbx[6]
variable        eele      equal c_mbx[7]
variable        etot      equal c_mbx[8]

#fix             1 all npt temp ${T} ${T} $(1000.0*dt) iso ${P} ${P} $(4000.0*dt)
#fix             1 all nvt temp ${T} ${T} $(1000.0*dt)
fix             1 all nve
fix             2 all mbx 1 ch4 1 2 5 1 2 2 2 2 json mbx.json

velocity        all create ${T} 428459 rot yes dist gaussian
velocity        all zero linear
velocity        all zero angular

thermo_style    custom step time temp cella cellb cellc evdwl ecoul epair ebond eangle edihed eimp emol elong etail v_e1bpip v_e2bpip v_e3bpip v_e4bpip v_edisp v_ebuck v_eele v_etot pe etotal
thermo          ${thermo_freq}
thermo_modify   flush yes


dump            1 all custom ${dump_freq} dump.lammpstrj id mol type q x y z
dump_modify     1 append yes sort id format line "%d %d %d %8.4f %15.8f %15.8f %15.8f"

restart         5 restart.1 restart.2

run             ${nsteps}  upto

write_data      final.data nocoeff

write_restart   restart.new
